Thu Nov 17 03:46:06 EST 2016
$PROBLEM    //like/1341//but/diagonal omega//
$INPUT      C ID SEQ TIME TAD TAFD EVID CMT AMT SS II LDOS DV MDV BLQ
            LLOQ OBST IMPT AGE RACE SEX HGT WGT BILI AST ALT KETO TRAS
            CAPE TADG STUD RTE HV LEGA
$DATA      PUMA-PCS-101_ex3.csv IGNORE=(C=C,TADG=1)
$SUBROUTINE ADVAN4 TRANS4
$PK
 DD = THETA(12)**TRAS * THETA(13)**CAPE * THETA(15)**KETO
 LV = (BILI/10)**THETA(10) * (LOG(ALT)/3)**THETA(11)
 CL = THETA(1)*EXP(ETA(1)) * (WGT/70) **THETA(4) * (AGE/53)**THETA(9) * LV * DD
 V2 = THETA(2)*EXP(ETA(2)) * (WGT/70) **THETA(5) * (AGE/53)**THETA(14)
 KA = THETA(3)*EXP(ETA(3)) * (AGE/53)**THETA(16)
 Q  = THETA(6)             * (WGT/70) **THETA(4)
 V3 = THETA(7)             * (WGT/70) **THETA(5)
 S2 =V2/1000
 ALAG1 = THETA(8)

$ERROR
 Y=F*(1+ERR(1)) + ERR(2)
 IPRE=F

$THETA  (0,181) ; CL(L/h)
 (0,4520) ; V2 (L)
 (0,0.404) ; KA
 (0,0.253) ; WT on CL
 (0,0.562) ; WT on V
 (0,137) ; Q (L/h)
 (0,1010) ; V3 (L)
 (0,0.581) ; alag1
 1.07 ; age on CL
 -0.0781 ; bili
 0.0402 ; alt
 1.53 ; tras
 1.29 ; cap
 1.11 ; age on V
 0.938 ; keto
 1 ; age on Ka
;
$OMEGA  .1
 .1
 .1
;.01 .1
;.01 .01 .1
;.01 .01 .01 .1
;.01 .01 .01 .01 .1
$SIGMA  0.1
 0.1
$ESTIMATION MAXEVAL=9999 PRINT=5 NOABORT METHOD=1 INTER MSFO=./mod.msf
$COVARIANCE PRINT=E
$TABLE      NOPRINT FILE=mod.tab ONEHEADER ID AMT TIME EVID PRED IPRE
            CWRESI CIWRESI
$TABLE      NOPRINT FILE=mod_par.tab ONEHEADER ID TIME CL Q V2 V3 KA
            ETA1 ETA2 ETA3

NM-TRAN MESSAGES
 WARNINGS AND ERRORS (IF ANY) FOR PROBLEM    1
 (WARNING  2) NM-TRAN INFERS THAT THE DATA ARE POPULATION.

1NONLINEAR MIXED EFFECTS MODEL PROGRAM (NONMEM) VERSION 7.3.0
 ORIGINALLY DEVELOPED BY STUART BEAL, LEWIS SHEINER, AND ALISON BOECKMANN
 CURRENT DEVELOPERS ARE ROBERT BAUER, ICON DEVELOPMENT SOLUTIONS,
 AND ALISON BOECKMANN. IMPLEMENTATION, EFFICIENCY, AND STANDARDIZATION
 PERFORMED BY NOUS INFOSYSTEMS.
 PROBLEM NO.:         1
 //like/1341//but/diagonal omega//
 TOT. NO. OF OBS RECS:     7713
 TOT. NO. OF INDIVIDUALS:    596
 TWO COMPARTMENT MODEL WITH FIRST-ORDER ABSORPTION (ADVAN4)
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 #TBLN:      1
 #METH: First Order Conditional Estimation with Interaction
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
 #TERM:
0MINIMIZATION SUCCESSFUL
 HOWEVER, PROBLEMS OCCURRED WITH THE MINIMIZATION.
 REGARD THE RESULTS OF THE ESTIMATION STEP CAREFULLY, AND ACCEPT THEM ONLY
 AFTER CHECKING THAT THE COVARIANCE STEP PRODUCES REASONABLE OUTPUT.
 NO. OF FUNCTION EVALUATIONS USED:     1534
 NO. OF SIG. DIGITS IN FINAL EST.:  3.4

 ETABAR IS THE ARITHMETIC MEAN OF THE ETA-ESTIMATES,
 AND THE P-VALUE IS GIVEN FOR THE NULL HYPOTHESIS THAT THE TRUE MEAN IS 0.

 ETABAR:        -3.0561E-03 -5.9894E-02  8.9836E-03
 SE:             1.6945E-02  2.4555E-02  2.4278E-02
 N:                     592         592         592

 P VAL.:         8.5688E-01  1.4721E-02  7.1136E-01

 ETAshrink(%):   5.3562E+00  2.2458E+01  3.0179E+01
 EBVshrink(%):   5.2590E+00  2.0979E+01  2.9142E+01
 EPSshrink(%):   7.5322E+00  6.5530E+00


 #TERE:
 Elapsed estimation time in seconds:   299.92
 Elapsed covariance time in seconds:   561.00

 ********************               FIRST ORDER CONDITIONAL ESTIMATION WITH INTERACTION              ********************
 #OBJT:**************                       MINIMUM VALUE OF OBJECTIVE FUNCTION                      ********************
 #OBJV:********************************************    48961.744       **************************************************

 ********************               FIRST ORDER CONDITIONAL ESTIMATION WITH INTERACTION              ********************
 ********************                             FINAL PARAMETER ESTIMATE                           ********************

 THETA - VECTOR OF FIXED EFFECTS PARAMETERS   *********
         TH 1      TH 2      TH 3      TH 4      TH 5      TH 6      TH 7      TH 8      TH 9      TH10      TH11      TH12
          TH13      TH14      TH15      TH16
         1.95E+02  4.43E+03  3.91E-01  3.81E-01  4.62E-01  5.20E+01  1.44E+03  7.27E-01 -1.02E-01 -8.05E-03  5.59E-02  8.82E-01
          9.86E-01  1.67E+00  1.72E-01  1.42E+00

 OMEGA - COV MATRIX FOR RANDOM EFFECTS - ETAS  ********
            ETA1      ETA2      ETA3
 ETA1
+        1.90E-01
 ETA2
+        0.00E+00  5.95E-01
 ETA3
+        0.00E+00  0.00E+00  7.17E-01

 SIGMA - COV MATRIX FOR RANDOM EFFECTS - EPSILONS  ****
            EPS1      EPS2
 EPS1
+        1.04E-01
 EPS2
+        0.00E+00  2.70E+00

 OMEGA - CORR MATRIX FOR RANDOM EFFECTS - ETAS  *******
            ETA1      ETA2      ETA3
 ETA1
+        4.36E-01
 ETA2
+        0.00E+00  7.71E-01
 ETA3
+        0.00E+00  0.00E+00  8.47E-01

 SIGMA - CORR MATRIX FOR RANDOM EFFECTS - EPSILONS  ***
            EPS1      EPS2
 EPS1
+        3.23E-01
 EPS2
+        0.00E+00  1.64E+00

 ********************               FIRST ORDER CONDITIONAL ESTIMATION WITH INTERACTION              ********************
 ********************                            STANDARD ERROR OF ESTIMATE                          ********************

 THETA - VECTOR OF FIXED EFFECTS PARAMETERS   *********
         TH 1      TH 2      TH 3      TH 4      TH 5      TH 6      TH 7      TH 8      TH 9      TH10      TH11      TH12
          TH13      TH14      TH15      TH16
         5.42E+00  3.33E+02  4.57E-02  1.03E-01  9.22E-02  5.01E+00  1.62E+02  2.21E-02  5.74E-02  3.89E-02  5.73E-02  3.18E-01
          6.98E-02  1.41E-01  2.07E-02  1.67E-01

 OMEGA - COV MATRIX FOR RANDOM EFFECTS - ETAS  ********
            ETA1      ETA2      ETA3
 ETA1
+        1.31E-02
 ETA2
+       .........  7.46E-02
 ETA3
+       ......... .........  1.05E-01

 SIGMA - COV MATRIX FOR RANDOM EFFECTS - EPSILONS  ****
            EPS1      EPS2
 EPS1
+        4.50E-03
 EPS2
+       .........  1.02E+00

 OMEGA - CORR MATRIX FOR RANDOM EFFECTS - ETAS  *******
            ETA1      ETA2      ETA3
 ETA1
+        1.50E-02
 ETA2
+       .........  4.84E-02
 ETA3
+       ......... .........  6.20E-02

 SIGMA - CORR MATRIX FOR RANDOM EFFECTS - EPSILONS  ***
            EPS1      EPS2
 EPS1
+        6.97E-03
 EPS2
+       .........  3.12E-01
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
 ********************               FIRST ORDER CONDITIONAL ESTIMATION WITH INTERACTION              ********************
 ********************                      EIGENVALUES OF COR MATRIX OF ESTIMATE                     ********************

             1         2         3         4         5         6         7         8         9        10        11        12
             13        14        15        16        17        18        19        20        21
         3.90E-02  6.06E-02  1.81E-01  2.20E-01  2.66E-01  3.09E-01  3.68E-01  4.90E-01  5.20E-01  6.09E-01  6.44E-01  8.16E-01
          8.45E-01  1.01E+00  1.04E+00  1.20E+00  1.26E+00  1.36E+00  1.83E+00  3.02E+00  4.91E+00
 #CPUT: Total CPU Time in Seconds,      837.920
