Thu Nov 17 04:37:40 EST 2016
$PROBLEM    //like/1341//but/diagonal omega//
$INPUT      C ID SEQ TIME TAD TAFD EVID CMT AMT SS II LDOS DV MDV BLQ
            LLOQ OBST IMPT AGE RACE SEX HGT WGT BILI AST ALT KETO TRAS
            CAPE TADG STUD RTE HV LEGA
$DATA      PUMA-PCS-101_ex3.csv IGNORE=(C=C,TADG=1)
$SUBROUTINE ADVAN4 TRANS4
$PK
 DD = THETA(12)**TRAS * THETA(13)**CAPE * THETA(15)**KETO
 LV = (BILI/10)**THETA(10) * (LOG(ALT)/3)**THETA(11)
 CL = THETA(1)*EXP(ETA(1)) * (WGT/70) **THETA(4) * (AGE/53)**THETA(9) * LV * DD
 V2 = THETA(2)*EXP(ETA(2)) * (WGT/70) **THETA(5) * (AGE/53)**THETA(14)
 KA = THETA(3)*EXP(ETA(3)) * (AGE/53)**THETA(16)
 Q  = THETA(6)             * (WGT/70) **THETA(4)
 V3 = THETA(7)             * (WGT/70) **THETA(5)
 S2 =V2/1000
 ALAG1 = THETA(8)

$ERROR
 Y=F*(1+ERR(1)) + ERR(2)
 IPRE=F

$THETA  (0,194.586) ; CL(L/h)
 (0,4433.58) ; V2 (L)
 (0,0.391314) ; KA
 (0,0.380553) ; WT on CL
 (0,0.462064) ; WT on V
 (0,51.9863) ; Q (L/h)
 (0,1439.35) ; V3 (L)
 (0,0.726992) ; alag1
 -0.101811 ; age on CL
 -0.00804501 ; bili
 0.055915 ; alt
 0.882252 ; tras
 0.986121 ; cap
 1.66661 ; age on V
 0.172123 ; keto
 1.42283 ; age on Ka
;
$OMEGA  0.190088
 0.59465
 0.71699
;.01 .1
;.01 .01 .1
;.01 .01 .01 .1
;.01 .01 .01 .01 .1
$SIGMA  0.10434
 2.69559
$ESTIMATION METHOD=1 INTERACTION NOABORT PRINT=5 MAXEVALS=0
$TABLE      ID MDV TIME DV ONEHEADER NOPRINT NOAPPEND FILE=npctab.dta

NM-TRAN MESSAGES
 WARNINGS AND ERRORS (IF ANY) FOR PROBLEM    1
 (WARNING  2) NM-TRAN INFERS THAT THE DATA ARE POPULATION.

1NONLINEAR MIXED EFFECTS MODEL PROGRAM (NONMEM) VERSION 7.2.0
 ORIGINALLY DEVELOPED BY STUART BEAL, LEWIS SHEINER, AND ALISON BOECKMANN
 CURRENT DEVELOPERS ARE ROBERT BAUER, ICON DEVELOPMENT SOLUTIONS,
 AND ALISON BOECKMANN. IMPLEMENTATION, EFFICIENCY, AND STANDARDIZATION
 PERFORMED BY NOUS INFOSYSTEMS.
 PROBLEM NO.:         1
 //like/1341//but/diagonal omega//
 TOT. NO. OF OBS RECS:     7713
 TOT. NO. OF INDIVIDUALS:    596
 TWO COMPARTMENT MODEL WITH FIRST-ORDER ABSORPTION (ADVAN4)
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 #TBLN:      1
 #METH: First Order Conditional Estimation with Interaction (Evaluation)

 ********************         FIRST ORDER CONDITIONAL ESTIMATION WITH INTERACTION (EVALUATION)       ********************
 #OBJT:**************                       MINIMUM VALUE OF OBJECTIVE FUNCTION                      ********************
 #OBJV:********************************************    48961.744       **************************************************

 ********************         FIRST ORDER CONDITIONAL ESTIMATION WITH INTERACTION (EVALUATION)       ********************
 ********************                             FINAL PARAMETER ESTIMATE                           ********************

 THETA - VECTOR OF FIXED EFFECTS PARAMETERS   *********
         TH 1      TH 2      TH 3      TH 4      TH 5      TH 6      TH 7      TH 8      TH 9      TH10      TH11      TH12
          TH13      TH14      TH15      TH16
         1.95E+02  4.43E+03  3.91E-01  3.81E-01  4.62E-01  5.20E+01  1.44E+03  7.27E-01 -1.02E-01 -8.05E-03  5.59E-02  8.82E-01
          9.86E-01  1.67E+00  1.72E-01  1.42E+00

 OMEGA - COV MATRIX FOR RANDOM EFFECTS - ETAS  ********
            ETA1      ETA2      ETA3
 ETA1
+        1.90E-01
 ETA2
+        0.00E+00  5.95E-01
 ETA3
+        0.00E+00  0.00E+00  7.17E-01

 SIGMA - COV MATRIX FOR RANDOM EFFECTS - EPSILONS  ****
            EPS1      EPS2
 EPS1
+        1.04E-01
 EPS2
+        0.00E+00  2.70E+00

 OMEGA - CORR MATRIX FOR RANDOM EFFECTS - ETAS  *******
            ETA1      ETA2      ETA3
 ETA1
+        4.36E-01
 ETA2
+        0.00E+00  7.71E-01
 ETA3
+        0.00E+00  0.00E+00  8.47E-01

 SIGMA - CORR MATRIX FOR RANDOM EFFECTS - EPSILONS  ***
            EPS1      EPS2
 EPS1
+        3.23E-01
 EPS2
+        0.00E+00  1.64E+00
